# OpenSim document version 20302
Model MuscleForceDirection Test Model:
  credits: Luca Modenese (l.modenese08@imperial.ac.uk)
  length_units: meters
  force_units: N
  gravity: 0 -9.8066 0
  publications:
    This is an example model distributed with the MuscleForceDirection plugin
  ForceSet:
    Thelen2003Muscle MuscleStraight:
      PathPoint Straight-P1: ground (0 0 0)
      PathPoint Straight-P2: MovingBody (0.3 0 0)
    Thelen2003Muscle MuscleViaPoint:
      PathPoint ViaPoint-P1: ground (-0.2 0 0.1)
      PathPoint ViaPoint-P2: ground (-0.3 0 0.1)
      PathPoint ViaPoint-P3: ground (-0.2 -0.2 0.1)
      PathPoint ViaPoint-P3: ground (0 0 0.1)
      PathPoint ViaPoint-P3: MovingBody (0.3 0 0.1)
      PathPoint ViaPoint-P4: MovingBody (0.5 0.2 0.1)
      PathPoint ViaPoint-P5: MovingBody (0.7 0 0.1)
      PathPoint ViaPoint-P5: MovingBody (0.5 0 0.1)
    Thelen2003Muscle MuscleWrap:
      PathPoint Wrap-P1: ground (0.3 0 0.2)
      PathPoint Wrap-P5: MovingBody (-0.3 0 0.2)
      PathWrap: wrap_object=WRAP method=axial
  BodySet:
    Body ground: mass=0 mass_center=(0 0 0) inertia_xx=0 inertia_yy=0 inertia_zz=0 meshes=treadmill.vtp
    Body MovingBody: mass=0 mass_center=(0 0 0) inertia_xx=0 inertia_yy=0 inertia_zz=0 meshes=treadmill.vtp
      CustomJoint MainJoint: parent_body=ground location_in_parent=(0 0 0) location=(0 0 0)
        Coordinate AngleRotation: motion_type=rotational default_value=0 range=(-1.570796 1.570796) clamped=false
        SpatialTransform: axes_held_at_zero=(rotation2 rotation3 translation1 translation2 translation3)
          TransformAxis rotation1: coordinates=AngleRotation axis=(0 0 1) LinearFunction(coefficients=1 0)
      WrapCylinder WRAP: translation=(0 0 0.2) quadrant=Y radius=0.05 length=0.05
